# NUFEB simulation with Cyanobacteria and E.Coli-Wild

units si                                   # using si units
atom_style      bacillus                      # using coccus atom style
atom_modify     map array sort 1000 1e-6  # map array: find atoms using indices
		                           # sort 1000 5.0e-6: sort every 1000
					   #   steps with 5.0e-6 binsize
boundary        pp pp ff                   # periodic boundaries in x and y
                                           #   fixed boundary in z
newton          on                        # forces between local and ghost
                                           #   atoms are computed in each
					   #   processor without communication
processors  * * *                # processor grid

comm_modify     vel yes                    # communicate velocities for ghost
                                           # atoms
comm_modify     cutoff 1e-5                # guarantee that enough atoms are
                                           # communicated to correctly compute
					   # grid values

read_data atom_66_33_22_1.in


group           CYANO type 1            # defining cyano group
group           ECW   type 2            # defining ecw group

neighbor        1e-5 bin                # setting neighbour skin distance and
                                        #   style
neigh_modify    check yes               # rebuild neighbour list if any atom
                                        #   had moved more than half the skin
					#   distance

# select grid style
grid_style      nufeb/monod 5 light o2 suc co2 gco2 2e-6

# set substrates initial concentration
grid_modify     set light  0.1
grid_modify     set o2     9e-3
grid_modify     set suc    3.42e-20
grid_modify     set co2    4.40e+01
grid_modify     set gco2   0

# define pair style
variable cutoff  equal 0
variable k_n        equal 1e-12
variable k_na       equal 0
variable c_n        equal 0
variable c_t        equal 0
variable mu         equal 1

pair_style bacillus ${c_n} ${c_t} ${mu} ${cutoff}
pair_coeff * * ${k_n} ${k_na}


# NVE integration with maximum distance limit
fix nve all nve/bacillus/limit 1e-9

# monod reaction fixes
# should consider using read_data's fix keyword
fix monod_cyano CYANO nufeb/monod/cyano light 3.5e-04 o2 co2 2e-4 suc gco2 growth 1.67e-05 yield 0.55 suc_exp 1
fix monod_ecw ECW nufeb/monod/ecoli/wild suc 3.6 o2 0.001 co2 growth 0.00027 yield 0.43 #maintain 9.5e-07 #decay 2e-05

# diffusion reaction fixes
fix diff_o2  all nufeb/diffusion_reaction o2  2.3e-09 nn nn nn 9e-3
fix diff_suc all nufeb/diffusion_reaction suc 5.2e-10 nn nn nn 3.42e-20
fix diff_co2 all nufeb/diffusion_reaction co2 1.9e-09 nn nn nn 4.40e+01

# biological model fixes
fix div_cya CYANO nufeb/divide/bacillus 5e-6 390445
fix div_ecw ECW nufeb/divide/bacillus 2.72e-6 372540

# mechanical model fixes
fix vis all viscous 1e-12

variable mass equal "mass(all)"
variable ncyano equal "count(CYANO)"
variable necoli equal "count(ECW)"

compute mycon all avg_con

##############Simulation exit condition##############
variable co2 equal c_mycon[4]
fix f_myhalt all halt 1 v_co2 <= 1e-19

# file output
dump 1 all vtk 1 dump*.vtu id type diameter #vx vy vz fx fy fz
dump 2 all grid/vtk 1 dump_%_*.vti con

#dump du1 all image 10 image.*.png type diameter zoom 2 bacillus type size 1280 720 view 45 60
#dump_modify du1 acolor 1 green acolor 2 red

dump du2 all movie 1 movie.avi type diameter zoom 2 bacillus type size 1280 720 view 45 60
dump_modify du2 acolor 1 green acolor 2 red

dump du3 all nufeb/hdf5 10 dump.h5 id type x y z vx vy vz fx fy fz radius conc reac
#dump        du4 all bio 10 ntypes biomass avg_con
# thermo output
thermo_style custom step atoms v_mass v_ncyano v_necoli c_mycon[*]
thermo 1
thermo_modify lost ignore

# issue run command
run_style nufeb diffdt 1e-4 difftol 1e-11 pairdt 1e-3 pairtol 1e-8 pairmax 1000 diffmax 1000000
timestep 1000
run 350
